<Lems>

    <!--

        This LEMS file has been automatically generated using PyNeuroML v0.5.13 (libNeuroML v0.2.56)

     -->

    <!-- Specify which component to run -->
    <Target component="example-single-izhikevich2007cell-sim"/>

    <!-- Include core NeuroML2 ComponentType definitions -->
    <Include file="Cells.xml"/>
    <Include file="Networks.xml"/>
    <Include file="Simulation.xml"/>

    <Include file="izhikevich2007_single_cell_network.nml"/>

    <Simulation id="example-single-izhikevich2007cell-sim" length="1000ms" step="0.1ms" target="IzhNet" seed="123">  <!-- Note seed: ensures same random numbers used every run -->

        <OutputFile id="output0" fileName="example-single-izhikevich2007cell-sim.v.dat">
            <OutputColumn id="IzhPop0[0]" quantity="IzhPop0[0]/v"/>
        </OutputFile>

    </Simulation>

</Lems>
