<Lems>

    <!--

        This LEMS file has been automatically generated using PyNeuroML v0.5.13 (libNeuroML v0.2.56)

     -->

    <!-- Specify which component to run -->
    <Target component="example_izhikevich2007network_sim"/>

    <!-- Include core NeuroML2 ComponentType definitions -->
    <Include file="Cells.xml"/>
    <Include file="Networks.xml"/>
    <Include file="Simulation.xml"/>

    <Include file="izhikevich2007_network.nml"/>

    <Simulation id="example_izhikevich2007network_sim" length="1000ms" step="0.1ms" target="IzNet" seed="123">  <!-- Note seed: ensures same random numbers used every run -->

        <EventOutputFile id="pop0" fileName="example_izhikevich2007network_sim.0.spikes.dat" format="ID_TIME">
            <EventSelection id="0" select="IzPop0[0]" eventPort="spike"/>
            <EventSelection id="1" select="IzPop0[1]" eventPort="spike"/>
            <EventSelection id="2" select="IzPop0[2]" eventPort="spike"/>
            <EventSelection id="3" select="IzPop0[3]" eventPort="spike"/>
            <EventSelection id="4" select="IzPop0[4]" eventPort="spike"/>
        </EventOutputFile>

        <EventOutputFile id="pop1" fileName="example_izhikevich2007network_sim.1.spikes.dat" format="ID_TIME">
            <EventSelection id="0" select="IzPop1[0]" eventPort="spike"/>
            <EventSelection id="1" select="IzPop1[1]" eventPort="spike"/>
            <EventSelection id="2" select="IzPop1[2]" eventPort="spike"/>
            <EventSelection id="3" select="IzPop1[3]" eventPort="spike"/>
            <EventSelection id="4" select="IzPop1[4]" eventPort="spike"/>
        </EventOutputFile>

    </Simulation>

</Lems>
