<neuroml xmlns="http://www.neuroml.org/schema/neuroml2"  xmlns:xs="http://www.w3.org/2001/XMLSchema" xmlns:xsi="http://www.w3.org/2001/XMLSchema-instance" xsi:schemaLocation="http://www.neuroml.org/schema/neuroml2 https://raw.github.com/NeuroML/NeuroML2/development/Schemas/NeuroML2/NeuroML_v2.1.xsd" id="network">
    <notes>OLM cell network</notes>
    <include href="olm.cell.nml"/>
    <pulseGenerator id="pg_olm" delay="100ms" duration="300ms" amplitude="0.08nA">
        <notes>Simple pulse generator</notes>
    </pulseGenerator>
    <network id="single_olm_cell_network">
        <population id="pop0" component="olm" size="1" type="populationList">
            <notes>A population for our cell</notes>
            <instance id="1">
                <location x="0." y="0." z="0."/>
            </instance>
        </population>
        <explicitInput target="pop0/0/olm/0" input="pg_olm"/>
    </network>
</neuroml>
